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/BATCH
/COM,ANSYS RELEASE 2021 R2           BUILD 21.2      UP20210601       14:07:21
/input,menust,tmp,''
/GST,ON
/PLO,INFO,3
/GRO,CURL,ON
/CPLANE,1
WPSTYLE,,,,,,,,0
/PREP7
RECTNG,-250,250,-100,100,
CYL4,0,0,10
ASBA,       1,       2
VOFFST,3,9,9,
FINISH
! /EXIT,MODEL
